## Input file for ABAQUS

*Heading
** Job name: euler_small_added_mass_inerta_damping Model name: Model-1
** Generated by: Abaqus/CAE 6.14-1
*Preprint, echo=NO, model=NO, history=NO, contact=NO
**
** PARTS
**
*Part, name=Part-1
*Node
      1,           0.,           0.,           0.
      2,  0.400000006,           0.,           0.
      3,  0.800000012,           0.,           0.
      4,   1.20000005,           0.,           0.
      5,   1.60000002,           0.,           0.
      6,           2.,           0.,           0.
      7,    2.4000001,           0.,           0.
      8,   2.79999995,           0.,           0.
      9,   3.20000005,           0.,           0.
     10,    3.5999999,           0.,           0.
     11,           4.,           0.,           0.
*Element, type=B31
 1,  1,  2
 2,  2,  3
 3,  3,  4
 4,  4,  5
 5,  5,  6
 6,  6,  7
 7,  7,  8
 8,  8,  9
 9,  9, 10
10, 10, 11
*Nset, nset=beam, generate
  1,  11,   1
*Elset, elset=beam, generate
  1,  10,   1
** Section: Section-1  Profile: Profile-1
*Beam General Section, elset=beam, poisson = -0.999875, section=GENERAL
0.01, 0.0001, 0., 0.0001, 0.0002
0.,0.,-1.
10000., 4e+07
*Damping, alpha=0.1
*End Part
**
**
** ASSEMBLY
**
*Assembly, name=Assembly
**
*Instance, name=Part-1-1, part=Part-1
*End Instance
**
*Nset, nset=fix, instance=Part-1-1
 1,
*Nset, nset=free, instance=Part-1-1
 11,
*Element, type=MASS, elset=free_Inertia-1_MASS_
1, Part-1-1.11
*Mass, elset=free_Inertia-1_MASS_, alpha=0.1
0.0189977,
*Element, type=ROTARYI, elset=free_Inertia-1_ROTI_
2, Part-1-1.11
*Rotary Inertia, elset=free_Inertia-1_ROTI_, alpha=0.1
0.2, 0.1, 0.1, 0., 0., 0.
*End Assembly
*Amplitude, name=Amp-1
             0.,              0.,             0.1,            0.01,             0.2,              0.,             10.,              0.
**
** BOUNDARY CONDITIONS
**
** Name: BC-1 Type: Symmetry/Antisymmetry/Encastre
*Boundary
fix, ENCASTRE
** ----------------------------------------------------------------
**
** STEP: Step-1
**
*Step, name=Step-1, nlgeom=NO, amplitude=RAMP
*Dynamic,alpha=0.,direct
0.1,5.,
**
** LOADS
**
** Name: Load-1   Type: Concentrated force
*Cload, amplitude=Amp-1
free, 2, 1.
**
** OUTPUT REQUESTS
**
*Restart, write, frequency=0
**
** FIELD OUTPUT: F-Output-1
**
*Output, field, time interval=0.1
*Node Output
A, AR, AT, U, UR, UT, V, VR
VT
**
** HISTORY OUTPUT: H-Output-1
**
*Output, history, variable=PRESELECT
*End Step
